// SBML level 3 version 2

model BIOMD0000000012()
  // model units - time: dimensionless

  // Parameters:
  PZ = 0 dimensionless;
  X = 0 dimensionless;
  PX = 0 dimensionless;
  Y = 20 dimensionless;
  PY = 0 dimensionless;
  Z = 0 dimensionless;
  tau_mRNA = 2 dimensionless;
  tau_prot = 10 dimensionless;
  eff = 20 dimensionless;
  ps_0 = 0.0005 dimensionless;
  ps_a = 0.5 dimensionless;
  KM = 40 dimensionless;
  n = 2 dimensionless;
  cell = 1 dimensionless;
  t_ave = tau_mRNA/ln(2); t_ave has dimensionless;
  beta = tau_mRNA/tau_prot; beta has dimensionless;
  k_tl = eff/t_ave; k_tl has dimensionless;
  a_tr = (ps_a - ps_0)*60; a_tr has dimensionless;
  a0_tr = ps_0*60; a0_tr has dimensionless;
  kd_prot = ln(2)/tau_prot; kd_prot has dimensionless;
  kd_mRNA = ln(2)/tau_mRNA; kd_mRNA has dimensionless;
  alpha = a_tr*eff*tau_prot/(ln(2)*KM); alpha has dimensionless;
  alpha0 = a0_tr*eff*tau_prot/(ln(2)*KM); alpha0 has dimensionless;

  // Rate rules:
  X' = -(kd_mRNA*X) + a0_tr + a_tr*KM^n/(KM^n + PZ^n);
  Y' = -(kd_mRNA*Y) + a0_tr + a_tr*KM^n/(KM^n + PX^n);
  Z' = -(kd_mRNA*Z) + a0_tr + a_tr*KM^n/(KM^n + PY^n);
  PX' = k_tl*X - kd_prot*PX;
  PY' = k_tl*Y - kd_prot*PY;
  PZ' = k_tl*Z - kd_prot*PZ;

  // Unit definitions:
  unit volume = 1e-15 litre;
  unit substance = item;
  unit time = 60 second;
end
